# OpenSim document version 40000
AnalyzeTool 2_scaled_rajagopal2022:
  model_file: Database/sub2/model/model_rajagopal2022_sub2.osim
  replace_force_set: false
  force_set_files: GenericSetups/gait2354_CMC_Actuators.xml
  results_directory: sample
  output_precision: 8
  initial_time: 1.27
  final_time: 2.42
  solve_for_equilibrium_for_auxiliary_states: false
  maximum_number_of_integrator_steps: 20000
  maximum_integrator_step_size: 1
  minimum_integrator_step_size: 1e-8
  integrator_error_tolerance: 1e-5
  external_loads_file: ProjectResults/Biomotum/ResultsBiomotum/sub2/v2_t3/setup_updated.xml
  coordinates_file: Database/sub2/IK/IK_sub2_v2_t3.mot
  lowpass_cutoff_frequency_for_coordinates: 6
  AnalysisSet Analyses:
    StaticOptimization: start_time=1.27 end_time=2.42 step_interval=1 in_degrees=true use_model_force_set=true
        activation_exponent=2 use_muscle_physiology=true optimizer_convergence_criterion=0.0001
        optimizer_max_iterations=100
