# OpenSim document version 40000
AnalyzeTool IK_sub2_v2_t1:
  model_file: C:\Users\movea\Dropbox\PostDoc Work\Simulation\Code\Database\sub2\model\model_rajagopal2022_sub2.osim
  replace_force_set: false
  results_directory: C:\Users\movea\Dropbox\PostDoc Work\Simulation\Code\ProjectResults\Biomotum\ResultsBiomotum\sub2\v2_t1\MuscleAnalysis
  output_precision: 8
  initial_time: 1.2
  final_time: 2.35
  solve_for_equilibrium_for_auxiliary_states: false
  maximum_number_of_integrator_steps: 20000
  maximum_integrator_step_size: 1
  minimum_integrator_step_size: 1e-8
  integrator_error_tolerance: 1e-5
  coordinates_file: C:\Users\movea\Dropbox\PostDoc Work\Simulation\Code\Database\sub2\IK\IK_sub2_v2_t1.mot
  lowpass_cutoff_frequency_for_coordinates: -1
  AnalysisSet Analyses:
    MuscleAnalysis: start_time=1.2 end_time=2.35 step_interval=1 in_degrees=true muscle_list=all
        moment_arm_coordinate_list=(ankle_angle_r knee_angle_r hip_flexion_r hip_adduction_r hip_rotation_r)
        compute_moments=true
