# OpenSim document version 40500
AnalyzeTool IK_sub4_v2_t1:
  model_file: C:\Users\Israel Luis\Documents\GitHub\GoalOptimized\Database\sub4\model\model_rajagopal2022_sub4.osim
  replace_force_set: false
  results_directory: C:\Users\Israel Luis\Documents\GitHub\GoalOptimized\ProjectResults\DSE\sub4\multiCycle\Je\MuscleAnalysis
  output_precision: 8
  initial_time: 0.15
  final_time: 1.36
  solve_for_equilibrium_for_auxiliary_states: false
  maximum_number_of_integrator_steps: 20000
  maximum_integrator_step_size: 1
  minimum_integrator_step_size: 1e-8
  integrator_error_tolerance: 1e-5
  coordinates_file: C:\Users\Israel Luis\Documents\GitHub\GoalOptimized\Database\sub4\IK\IK_sub4_v2_t1.mot
  lowpass_cutoff_frequency_for_coordinates: -1
  AnalysisSet Analyses:
    MuscleAnalysis: start_time=0.15 end_time=1.36 step_interval=1 in_degrees=true muscle_list=all
        moment_arm_coordinate_list=(ankle_angle_l knee_angle_l hip_flexion_l hip_adduction_l hip_rotation_l)
        compute_moments=true
