# OpenSim document version 40000
AnalyzeTool TrialKne_r_ankDor20hip0_ankPla15hip0_ankDor20hipExt15_rajagopalModel:
  model_file: C:\Users\movea\Desktop\delete\Version2\V2\GithubFolder\DataExample\Model.osim
  replace_force_set: false
  results_directory: C:\Users\movea\Desktop\delete\Version2\V2\GithubFolder\Results_AllCalibration\MuscleAnalysis
  output_precision: 8
  initial_time: 0
  final_time: 2.99
  solve_for_equilibrium_for_auxiliary_states: false
  maximum_number_of_integrator_steps: 20000
  maximum_integrator_step_size: 1
  minimum_integrator_step_size: 1e-8
  integrator_error_tolerance: 1e-5
  coordinates_file: DataDigitalized\TrialKne_r_ankDor20hip0_ankPla15hip0_ankDor20hipExt15_rajagopalModel.mot
  lowpass_cutoff_frequency_for_coordinates: -1
  AnalysisSet Analyses:
    MuscleAnalysis: start_time=0 end_time=2.99 step_interval=1 in_degrees=true muscle_list=all
        moment_arm_coordinate_list=knee_angle_r compute_moments=true
